table  # each column defines a variable
    A (V) | ω (rad/s)
    4 | 2*π*1500
    2 | 2*π*3000
end table
# [plot: A vs ω]
# 2*π*1500 | 2*π*3000
table  # each column defines a variable
    Φ (rad) | ω (rad/s)
    3*π/4 | 2*π*1500
    -π/3 | 2*π*3000
end table
# [plot: Φ vs ω]
2*π*3000
2*π*1500
f(t) := 2 + 1.2*sin(1200*t + π/12)
# [plot: f(t) vs t]
table  # each column defines a variable
    A (V) | ω (rad/s)
    2 | 0
    1.2 | 1200
end table
# [plot: A vs ω]
table  # each column defines a variable
    Φ (rad) | ω (rad/s)
    0 | 0
    π/12 | 1200
end table
# [plot: Φ vs ω]
q := 1.5
k := 1 .. 10
A := 5
a[k] := (2*A/(π*k))*sin(π*k/q)
a[1] = 2.75664
a[2] = -1.37832
# [plot: a[k] vs k]
A := 1.5
b[k] := -2*A/(π*k)*(-1)^k
b[1] = 0.95493
b[2] = -0.477465
# [plot: b[k] vs k]
A := 0.75
a[k] := 4*A/(π*k)^2*(1 - (-1)^k)
# [plot: a[k] vs k]
