ω_B := π
n := 0
T := 1
Si(ω) :=
    if |ω| < ω_B
        T*e^(-1i*ω*T*n)
    else
        0
ϕ_n(t) := sin(ω_B*(t - n*T))/(ω_B*(t - n*T))
# [plot: ϕ_n(t), Si(t) vs t]
τ := 1
D := 1
T_c := 2
x(t) :=
    if 0 ≤ t ≤ τ
        (D/τ)*t
    else if τ ≤ t ≤ T_c
        D*(t - T_c)/(τ - T_c)
    else
        0
# [plot: x(t) vs t]
Sj(ω) := integral(x(t)*e^(-1j*ω*t), t = 0 .. ∞)
# [plot: |Sj(ω)| vs ω]
ω := 20
ω_B := maximize(Sj, ω) = 19.8794
T := π/ω_B = 0.158033
n := T_c/T = 12.6556
Y :=
    for i ∈ 0 .. n
        z[i] ← x(i*T)
        z
X :=
    for i ∈ 0 .. n
        z[i] ← i*T
        z
# [plot: x(t), Y vs t, X]
Y_mid := (Y[6] + Y[7])/2 = 0.920984
ε_max := x(1) - Y_mid
ε_max = 0.0790165
