# Входные данные
M_1 := 37
M_2 := 29
b := 2.2
N := 200
n := 0 .. N - 1
f(n) := sin(2*π/M_1*n) + cos(2*π/M_2*n)
r_1(n) := rnd(b)
r(n) := r_1(n) + mean(r_1(n))
x(n) := f(n) + r(n)
# [plot: x(n) vs n]
# Скользящее усреднение
L := 2
y(n) := 1/(L + 1)*sum(x(n + λ), λ = 0 .. L)
# [plot: x(n), y(n) vs n]
J := sum((y(p) - x(p))^2, p = 10 .. N - 10) = 184.101
# Метод четвертых разностей
y(n) := 1/35*(-3*x(n - 2) + 12*x(n - 1) + 17*x(n) + 12*x(n + 1) - 3*x(n + 2))
# [plot: x(n), y(n) vs n]
J := sum((y(p) - x(p))^2, p = 10 .. N - 10) = 236.91
# Экспоненциальное сглаживание
α := 0.4
y(n) := α*sum((1 - α)^v*x(n - v), v = 0 .. n - 1) + (1 - α)^n*x(0)
J := sum((y(p) - x(p))^2, p = 10 .. N - 10) = 239.515
# [plot: x(n), y(n) vs n]
