Hii(w) := 1/w
φii(w) := -π/2
# [plot: Hii(w) vs w]
# [plot: φii(w) vs w]
Hid(w) := w
φid(w) := π/2
# [plot: Hid(w) vs w]
# [plot: φid(w) vs w]
T := 1
j := sqrt(-1)
H(z) := T*z^-1/(1 - z^-1)
Hp(w) := |H(e^(j*w*T))|
φp(w) := arg(H(e^(j*w*T)))
# [plot: Hp(w), |Hii(w)| vs w]
# [plot: φp(w), φii(w) vs w]
H(z) := T/2*(1 + z^-1)/(1 - z^-1)
Ht(w) := |H(e^(j*w*T))|
φt(w) := arg(H(e^(j*w*T)))
# [plot: Ht(w), |Hii(w)| vs w]
# [plot: φt(w), φii(w) vs w]
M := 10
n := -10 .. 10
x(n) := sin(2*π/M*n)
yii(n) := -M/(2*π)*cos(2*π/M*n)
yp(n) :=
    if n == -11
        0 + T*x(n - 1)
    else
        yp(n - 1) + T*x(n - 1)
yt(n) :=
    if n == -11
        0 + T/2*(x(n - 1) + x(n))
    else
        yt(n - 1) + T/2*(x(n - 1) + x(n))
# [plot: yp(n), yii(n) vs n]
# [plot: yt(n), yii(n) vs n]
H(z) := 1/T*(1 - z^-1)
Hd(w) := |H(e^(j*w*T))|
φd(w) := arg(H(e^(j*w*T)))
# [plot: Hd(w), |Hid(w)| vs w]
# [plot: φd(w), φid(w) vs w]
yid(n) := M/(2*π)*cos(2*π/M*n)
yr(n) := 1/T*(x(n) - x(n - 1))
# [plot: yr(n), yid(n) vs n]
